# 1.Расчет  ЭД
m := 18  # кг  # масса робота
g := 9.8
V := 1.1  # м/c  скорость движения
D := 97  # мм  # диаметр колеса
fk := 0.025  # коэффициентр трения качения
η_пер := 0.97  # КПД цилиндрический зубчатая передача
R := D/(2*1000)
R = 0.0485
Fk := fk*m*g/R  # сила трения качения
Tko := Fk*R/2
# необходимый момент для одного колеса
Tko = 2.205  # Н/м
n_к := V*60/(2*π*R)
# частота вращения колеса
n_к = 216.582  # об/мин
k := 1.5  # коэффициент безопастности
P := Tko*n_к*2*3.14*k/60
P = 74.9774  # Вт
# CHIHAI MOTOR
# CHP-42GP-775 ABHL
# Напряжение: 24 В
# номинальный момент: 3 Н/м
# номинальныя частота вращения выходного вала: 250 об/мин
# номинальный ток: 9 А
Pдв := 0.12*6200*2*3.14/60
Pдв = 77.872  # Вт
Pдв > P  # двигатель выбран правильно
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